// COMSOL Multiphysics 5.3.1.275 model "TubeSlit_Concept.mph"
// Outline of the model tree

Parameters
  H = 0.1[m]
  L = 0.3[m]
  L_PML = 0.3[m]

Probes
  pdom1: DomainPoint "Domain Point Probe 1"
    ppb1: PointExpr "Point Probe Expression 1"
      expr = acpr.p_s
      unit = Pa
      descr = Scattered pressure field
      table = tbl1

Coordinate systems
  pml1: PML "Perfectly Matched Layer 1" on domains 1

Geometry
  geom1 "Geometry 1" (2D, length unit m)
    r1: Rectangle "PML" | pos = {-L_PML/2, 0}; base = center; size = {L_PML, H}
    r3: Rectangle "Slit" | pos = {L/2, 0}; base = center; size = {L, H}
    fin: Finalize "Form Union"

Materials
  mat1: Common "Air" on all domains
    def "Basic"
      dynamicviscosity = eta(T[1/K])[Pa*s]
      ratioofspecificheat = 1.4
      electricconductivity = 0[S/m]
      heatcapacity = Cp(T[1/K])[J/(kg*K)]
      density = rho(pA[1/Pa],T[1/K])[kg/m^3]
      thermalconductivity = k(T[1/K])[W/(m*K)]
      soundspeed = cs(T[1/K])[m/s]
      eta: Piecewise | arg = T; pieces = {200.0, 1600.0, -8.38278E-7+8.35717342E-8*T^1-7.69429583E-11*T^2+4.6437266E-14*T^3-1.06585607E-17*T^4}
      Cp: Piecewise | arg = T; pieces = {200.0, 1600.0, 1047.63657-0.372589265*T^1+9.45304214E-4*T^2-6.02409443E-7*T^3+1.2858961E-10*T^4}
      rho: Analytic | expr = pA*0.02897/R_const[K*mol/J]/T; args = {pA, T}; dermethod = manual; argders = {{pA, d(pA*0.02897/R_const/T,pA)}, {T, d(pA*0.02897/R_const/T,T)}}
      k: Piecewise | arg = T; pieces = {200.0, 1600.0, -0.00227583562+1.15480022E-4*T^1-7.90252856E-8*T^2+4.11702505E-11*T^3-7.43864331E-15*T^4}
      cs: Analytic | expr = sqrt(1.4*287*T); args = T; dermethod = manual; argders = {T, d(sqrt(1.4*287*T),T)}

Physics
  acpr: PressureAcoustics "Pressure Acoustics, Frequency Domain" on all domains
    dependent variable p
    fpam1: FrequencyPressureAcousticsModel "Pressure Acoustics 1" (default)
    shb1: SoundHard "Sound Hard Boundary (Wall) 1" (default)
    init1: init "Initial Values 1" (default)
    bpf1: BackgroundPressureField on domains 2 | pamp = 1; c_mat = from_mat

Mesh
  mesh1 "Mesh 1" (physics-controlled)
    size: MeshSizeDefault | hauto = 2

Studies
  std1 "Study 1"
    freq: Frequency "Frequency Domain" | plist = 300

Solver configurations
  sol1 "Solution 1" (study std1)
    v1: Variables "Dependent Variables 1"
    s1: Stationary "Stationary Solver 1"
      dDef: Direct
      p1: Parametric | pname = freq; plistarr = 300; punit = Hz; pcontinuationmode = no
      fc1: FullyCoupled | linsolver = dDef

Datasets
  dset1: Solution | solution = sol1
  dset2: Solution "Probe Solution 2" | solution = sol1
  cpt1: CutPoint2D "Domain Point Probe 1" | data = dset2; pointx = 0; pointy = 0

Derived values
  pev1: EvalPoint "Point Probe Expression 1" | data = cpt1; table = tbl1; expr = acpr.p_s

Tables
  tbl1: Table "Probe Table 1"
    freq (Hz) | Scattered pressure field (Pa), Point: (0, 0)
    300 | -0.988219+0.153146i

Plots
  pg1: PlotGroup2D "Acoustic Pressure (acpr)" | data = dset1
    surf1: Surface | expr = acpr.p_t
  pg2: PlotGroup2D "Sound Pressure Level (acpr)" | data = dset1
    surf1: Surface | expr = acpr.Lp; unit = dB; descr = Sound pressure level
  pg3: PlotGroup1D "Probe Plot Group 3"
    tblp1: Table "Probe Table Graph 1" | table = tbl1